*Heading
** Job name: Job-1 Model name: Model-1
** Generated by: Abaqus/CAE 2022
*NODE, NSET=NALL
      1,          10.,           1.,  0.100000001
      2,          10.,           0.,  0.100000001
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*ELEMENT, TYPE=C3D10, ELSET=EALL
  1,  48,  89, 126,   3, 129, 128, 127, 131, 130, 132
  2,  63, 122,  93,  64, 135, 134, 133, 137, 136, 138
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**
*NSET, NSET=Nfix1
   5,   6,   7,   8,  49,  88, 319, 321, 423, 424, 426, 429, 430, 554, 555
*NSET, NSET=Load
   1,   2
*BOUNDARY
Nfix1,1
Nfix1,2
Nfix1,3
Nfix1,4
Nfix1,5
Nfix1,6
**
*MATERIAL,NAME=EL
*ELASTIC
1.2e+06,0.
**
*SOLID SECTION, ELSET=EALL, MATERIAL=EL

*NSET, NSET=DES
1

*DESIGNVARIABLES, TYPE=COORDINATE
DES

*SOLID SECTION, ELSET=EALL, MATERIAL=EL
*STEP, NLGEOM
*STATIC, DIRECT
**Specify time step size and end time
0.1, 1

**Begin setup for static analysis

** Define concentrated load on <nodeset>, <dof>, <magnitude>
*CLOAD
Load, 3, 0.5
*END STEP

*NODE FILE
 U
***EL FILE
** S, E
*END STEP


*STEP
*SENSITIVITY
*OBJECTIVE
STRAINENERGY
*END STEP
