*Heading
** Job name: Job-1 Model name: Model-1
** Generated by: Abaqus/CAE 2022
*NODE, NSET=NALL
      1,          10.,           1.,  0.100000001
      2,          10.,           0.,  0.100000001
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*ELEMENT, TYPE=C3D10, ELSET=EALL
  1,  48,  89, 126,   3, 129, 128, 127, 131, 130, 132
  2,  63, 122,  93,  64, 135, 134, 133, 137, 136, 138
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**
*NSET, NSET=Nfix1
   5,   6,   7,   8,  49,  88, 319, 321, 423, 424, 426, 429, 430, 554, 555
*NSET, NSET=Load
   1,   2,  3,  4, 9, 10
*BOUNDARY
Nfix1,1
Nfix1,2
Nfix1,3
Nfix1,4
Nfix1,5
Nfix1,6
**
*MATERIAL,NAME=EL
*ELASTIC
1.2e+06,0.
**
*SOLID SECTION, ELSET=EALL, MATERIAL=EL

*NSET, NSET=DES
1

*DESIGNVARIABLES, TYPE=COORDINATE
DES

*SOLID SECTION, ELSET=EALL, MATERIAL=EL
*AMPLITUDE, NAME=RAMP
0.0, 0.0
1.0, 1.0
*STEP, NLGEOM
*STATIC, DIRECT
0.1, 1.0
*CONTROLS, PARAMETERS=TIME INCREMENTATION
10, 10, 10, 50, 10, 4, 12, 20, , , ,
0.25, 0.5, 0.75, 0.85, , , ,
*CONTROLS, PARAMETERS=FIELD
0.005, 0.005, 1.0, 0.0, 0.02, 1e-5
*CLOAD, AMPLITUDE=RAMP
Load, 3, 0.2
*END STEP

*NODE FILE
 U
***EL FILE
** S, E
*END STEP


*STEP
*SENSITIVITY
*OBJECTIVE
STRAINENERGY
*END STEP
