*Heading
** Job name: NLCB_C3D10 Model name: Model-1
** Generated by: Abaqus/CAE 2022
*NODE, NSET=NALL
      1,           0.,           0.,         0.25
      2,           0.,  0.100000001,         0.25
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*ELEMENT, TYPE=C3D10, ELSET=EALL
    1,  1203,  1204,  1205,  1206,  2478,  2477,  2476,  2480,  2479,  2481
    2,  1203,  1207,  1208,  1205,  2484,  2483,  2482,  2476,  2485,  2486
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*NSET, NSET=FIX
     1,     2,     3,     4,    11,    12
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
**

*BOUNDARY
FIX,1
FIX,2
FIX,3
FIX,4
FIX,5
FIX,6
** MATERIALS
*MATERIAL,NAME=EL
*ELASTIC
3e+09, 0.4
*SOLID SECTION, ELSET=EALL, MATERIAL=EL
*NSET, NSET=DES
1

*DESIGNVARIABLES, TYPE=COORDINATE
DES
*STEP, NLGEOM, INC=200, STABILIZE=0.0002
*STATIC
0.1, 1.0, 1e-5, 0.5
*CONTROLS, PARAMETERS=TIME INCREMENTATION
, , , , , , 12, 50, , ,
*CONTROLS, PARAMETERS=FIELD
5e-3, 5e-3, , , , ,
*CONTROLS, PARAMETERS=LINE SEARCH
10, , , ,
*STATIC
*CLOAD
10,    3,      0.00
13759, 3,  6623.85
213,   3,  8672.65
8223,  3,  9696.32
214,   3,  10014.32
9030,  3,  9696.32
215,   3,  8672.65
11977, 3,  6623.85
7,     3,      0.00

*END STEP

*NODE FILE
 U
***EL FILE
** S, E
*END STEP


*STEP
*SENSITIVITY
*OBJECTIVE
STRAINENERGY
*END STEP
