*Heading
** Job name: C3D10Fine Model name: Model-1
** Generated by: Abaqus/CAE 2022
*NODE, NSET=NALL
      1,          10.,           1.,  0.100000001
      2,          10.,           0.,  0.100000001
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*ELEMENT, TYPE=C3D10, ELSET=EALL
    1,  1885,  3103,  1984,  1985,  4125,  4124,  4123,  4127,  4126,  4128
    2,  3104,  1751,  2104,   274,  4131,  4130,  4129,  4133,  4132,  4134
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
*Nset, nset=Load
2, 17, 16, 15, 14, 13, 12, 11, 10, 9, 1
*Nset, nset=Nfix1
     5,     6,     7,     8,   134,   135
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**

*BOUNDARY
Nfix1,1
Nfix1,2
Nfix1,3
**
*MATERIAL,NAME=EL
*ELASTIC
1.2e+06,0.
**
*SOLID SECTION, ELSET=EALL, MATERIAL=EL

*NSET, NSET=DES
1

*DESIGNVARIABLES, TYPE=COORDINATE
DES

*SOLID SECTION, ELSET=EALL, MATERIAL=EL
*STEP, NLGEOM
*STATIC, DIRECT
0.1, 1.0
*CONTROLS, PARAMETERS=TIME INCREMENTATION
10, 10, 10, 100, 10, 4, 12, 20, , , ,

*CLOAD
2,   3, 0.00000
17,  3, 0.1
16,  3, 0.1
15,  3, 0.1
14,  3, 0.1
13,  3, 0.1
12,  3, 0.1
11,  3, 0.1
10,  3, 0.1
9,   3, 0.1
1,   3, 0.00000
*END STEP

*NODE FILE
 U
***EL FILE
** S, E
*END STEP


*STEP
*SENSITIVITY
*OBJECTIVE
STRAINENERGY
*END STEP
